l1 := 0.5
w := 0.1
R := 0.16
μ := 0.998
Ukm := 10
h := 0.25
fi := (π*30)/180
m := 200
U := Ukm*1000/3600 = 2.77778
m := 400
Ukm_pand := 0.5
Wtest := 10.3
mg := m*10
Wlinear := U/R = 17.3611
μ2 := 0.01
μ2 := 0.01
Utest := Wtest*R = 1.648
U_pand := Ukm_pand*1000/3600 = 0.138889
t := 5
Ukmtest := Utest*3600/1000 = 5.9328
ε := Wlinear/t = 3.47222
ddotX := U/t = 0.555556
Wlinear_pand := U_pand/R = 0.868056
m_wheel := 1.5
t := 5
ddotX_pand := U_pand/t = 0.0277778
Jo := 0.5*m_wheel*R^2*ε = 0.0666667
ε_pand := Wlinear_pand/t = 0.173611
Jk := (m*ddotX)*R = 35.5556
Jo_pand := 0.5*m_wheel*R^2*ε_pand = 0.00333333
m_wheel := 1.5
Mk := mg*μ2 = 40
Jk_pand := (m*ddotX_pand + mg*sin(fi))*R = 321.778
n := 0.65
Mk_pand := mg*cos(fi)*μ2 = 34.641
Md := Jo + Jk + Mk = 75.6222
Md_pand := Jo_pand + Jk_pand + Mk_pand = 356.422
Nd := Md*Wlinear = 1312.89
Nd_pand := Md_pand*Wlinear_pand = 309.394
Nd_real := 1.2*Nd/n = 2423.79
Nd_pand_real := 1.2*Nd_pand/n = 571.189
M1d := Md/4 = 18.9056
N1_pand := Nd_pand_real/6 = 95.1982
N1m := Nd_real/4 = 605.947
M1_pand := Md_pand/6 = 59.4037
Mp := 0.5*l1*mg = 1000
Nd := Mp*0.3 = 300
Np_real := 1.2*Nd/0.35 = 1028.57
Np_real1 := Np_real/4 = 257.143
Mp1 := Mp/4 = 250
VPrivod := 24
WPrivod := 750
omegaP := 209.4
IPrivod := WPrivod/VPrivod = 31.25
NReductor := omegaP/Wlinear = 12.0614
MPlinear := WPrivod/omegaP = 3.58166
MPRlinear := MPlinear*NReductor = 43.2
MP_pand := WPrivod/(Wlinear_pand*NReductor) = 71.6332
MPR_pand := MP_pand*NReductor = 864
mR := 3
Z := 15
L := π*mR*Z = 141.372
